<?xml version="1.0"?>

<Node name="root" dt="0.01" gravity="0 0 -9.81">

    <RequiredPlugin pluginName='SofaPreconditioner'/> <!-- Needed to use components [ShewchukPCGLinearSolver, ]-->
    <RequiredPlugin pluginName='SofaSparseSolver'/> <!-- Needed to use components [SparseLUSolver, ]-->
    <RequiredPlugin pluginName='SofaOpenglVisual'/> <!-- Needed to use components [OglModel, ]-->
    <RequiredPlugin name='SofaConstraint'/> <!-- Needed to use components [LinearSolverConstraintCorrection, ]-->
    <RequiredPlugin name='SofaGeneralSimpleFem'/> <!-- Needed to use components [BeamFEMForceField, ]-->
    <RequiredPlugin name='SofaImplicitOdeSolver'/> <!-- Needed to use components [EulerImplicitSolver, ]-->
    <RequiredPlugin name='SofaMiscMapping'/> <!-- Needed to use components [BeamLinearMapping, TubularMapping, ]-->
    <RequiredPlugin name='SofaTopologyMapping'/> <!-- Needed to use components [Edge2QuadTopologicalMapping, ]-->
    <RequiredPlugin name="Sofa.Component.Constraint.Projective"/> <!-- Needed to use components [FixedConstraint] -->
    <RequiredPlugin name="Sofa.Component.Engine.Select"/> <!-- Needed to use components [BoxROI] -->
    <RequiredPlugin name="Sofa.Component.LinearSolver.Direct"/> <!-- Needed to use components [SparseLDLSolver] -->
    <RequiredPlugin name="Sofa.Component.Mapping.Linear"/> <!-- Needed to use components [IdentityMapping] -->
    <RequiredPlugin name="Sofa.Component.Mass"/> <!-- Needed to use components [UniformMass] -->
    <RequiredPlugin name="Sofa.Component.ODESolver.Backward"/> <!-- Needed to use components [EulerImplicitSolver] -->
    <RequiredPlugin name="Sofa.Component.SolidMechanics.FEM.Elastic"/> <!-- Needed to use components [TetrahedronFEMForceField] -->
    <RequiredPlugin name="Sofa.Component.StateContainer"/> <!-- Needed to use components [MechanicalObject] -->
    <RequiredPlugin name="Sofa.Component.Topology.Container.Dynamic"/> <!-- Needed to use components [TetrahedronSetTopologyContainer,TetrahedronSetTopologyModifier,TriangleSetTopologyContainer,TriangleSetTopologyModifier] -->
    <RequiredPlugin name="Sofa.Component.Topology.Container.Grid"/> <!-- Needed to use components [RegularGridTopology] -->
    <RequiredPlugin name="Sofa.Component.Topology.Mapping"/> <!-- Needed to use components [Hexa2TetraTopologicalMapping,Tetra2TriangleTopologicalMapping] -->
    <RequiredPlugin name="Sofa.Component.Visual"/> <!-- Needed to use components [VisualStyle] -->
    <RequiredPlugin name="Sofa.GL.Component.Rendering3D"/> <!-- Needed to use components [OglModel] -->
    <RequiredPlugin name="MultiThreading"/> <!-- Needed to use components [ParallelCGLinearSolver] -->

    <VisualStyle
            displayFlags="   showForceFields "/>
    <DefaultAnimationLoop />


    <!-- $$$$$$$$$$$$$$$$$$$$$$ TOPOLOGY 1 $$$$$$$$$$$$$$$$$$$$$$ -->
    <Node name="BEAMVOLUME">
        <RegularGrid name="HexaTop" n="40 10 10" min="0 0 0" max="0.5 0.1 0.1"/>
        <TetrahedronSetTopologyContainer name="Container" position="@HexaTop.position"/>
        <TetrahedronSetTopologyModifier name="Modifier"/>
        <Hexa2TetraTopologicalMapping input="@HexaTop" output="@Container" swapping="true"/>
    </Node>


    <Node name="FEM">
        <EulerImplicitSolver firstOrder="false" rayleighMass="0.1" rayleighStiffness="0.1"/>
        <ParallelCGLinearSolver template="ParallelCompressedRowSparseMatrixMat3x3d" iterations="100" tolerance="1e-20" threshold="1e-20" warmStart="1" />
<!--         <CGLinearSolver template="CompressedRowSparseMatrixMat3x3d" iterations="100" tolerance="1e-20" threshold="1e-20" warmStart="1" /> -->

        <TetrahedronSetTopologyContainer name="Container" position="@../BEAMVOLUME/HexaTop.position"
                                         tetrahedra="@../BEAMVOLUME/Container.tetrahedra"/>
        <TetrahedronSetTopologyModifier name="Modifier"/>

        <MechanicalObject name="mstate" template="Vec3d" src="@Container"/>
        <TetrahedronFEMForceField name="forceField" listening="true" youngModulus="6e4" poissonRatio="0.40" />

        <BoxROI name="box" box="-0.01 -0.01 -0.01 0.01 0.11 0.11"/>
        <FixedConstraint indices="@box.indices"/>

        <UniformMass totalMass="1"/>


        <Node name="Surface">
            <TriangleSetTopologyContainer name="Container"/>
            <TriangleSetTopologyModifier name="Modifier"/>
            <Tetra2TriangleTopologicalMapping input="@../Container" output="@Container" flipNormals="false"/>
            <MechanicalObject name="dofs" rest_position="@../mstate.rest_position"/>
            <TriangleCollisionModel name="Torus8CMT" proximity="0.001" contactStiffness="20" color="0.94117647058824 0.93725490196078 0.89411764705882" />
            <Node name="Visual" activated="1">
                <TriangleSetTopologyContainer name="Container" src="@../Container"/>
                <OglModel color="1.0 0.1 0.2 1.0" name="visualModel"/>
                <IdentityMapping name="VisualMapping"/>
            </Node>
            <IdentityMapping name="SurfaceMapping"/>
        </Node>


    </Node>


</Node>
